<Lems>

    <!--

        This LEMS file has been automatically generated using PyNeuroML v0.1.7 (libNeuroML v0.2.12)

     -->

    <!-- Specify which component to run -->
    <Target component="Sim_Complex"/>

    <!-- Include core NeuroML2 ComponentType definitions -->
    <Include file="Cells.xml"/>
    <Include file="Networks.xml"/>
    <Include file="Simulation.xml"/>

    <Include file="Complex.net.nml"/>
    <Include file="../NeuroML2/prototypes/izhikevich/RS.cell.nml"/>
    <Include file="../NeuroML2/prototypes/iaf/iaf.cell.nml"/>
    <Include file="../NeuroML2/prototypes/iaf/iafRef.cell.nml"/>
    <Include file="../NeuroML2/prototypes/acnet2/pyr_4_sym_soma.cell.nml"/>
    <Include file="Ca_conc.nml"/>
    <Include file="Ca_pyr.channel.nml"/>
    <Include file="Kahp_pyr.channel.nml"/>
    <Include file="Kdr_pyr.channel.nml"/>
    <Include file="LeakConductance_pyr.channel.nml"/>
    <Include file="Na_pyr.channel.nml"/>
    <Include file="../NeuroML2/prototypes/acnet2/pyr_4_sym.cell.nml"/>
    <Include file="Ca_conc.nml"/>
    <Include file="Ca_pyr.channel.nml"/>
    <Include file="Kahp_pyr.channel.nml"/>
    <Include file="Kdr_pyr.channel.nml"/>
    <Include file="LeakConductance_pyr.channel.nml"/>
    <Include file="Na_pyr.channel.nml"/>
    <Include file="../NeuroML2/prototypes/izhikevich/RS.cell.nml"/>
    <Include file="../NeuroML2/prototypes/iaf/iaf.cell.nml"/>
    <Include file="../NeuroML2/prototypes/iaf/iafRef.cell.nml"/>
    <Include file="../NeuroML2/prototypes/acnet2/pyr_4_sym_soma.cell.nml"/>
    <Include file="Ca_conc.nml"/>
    <Include file="Ca_pyr.channel.nml"/>
    <Include file="Kahp_pyr.channel.nml"/>
    <Include file="Kdr_pyr.channel.nml"/>
    <Include file="LeakConductance_pyr.channel.nml"/>
    <Include file="Na_pyr.channel.nml"/>
    <Include file="../NeuroML2/prototypes/acnet2/pyr_4_sym.cell.nml"/>
    <Include file="Ca_conc.nml"/>
    <Include file="Ca_pyr.channel.nml"/>
    <Include file="Kahp_pyr.channel.nml"/>
    <Include file="Kdr_pyr.channel.nml"/>
    <Include file="LeakConductance_pyr.channel.nml"/>
    <Include file="Na_pyr.channel.nml"/>

    <Simulation id="Sim_Complex" length="500ms" step="0.025ms" target="Complex">

        <Display id="display_popIaf" title="Voltages popIaf" timeScale="1ms" xmin="-50.0" xmax="550.0" ymin="-80" ymax="40">
            <Line id="popIaf 0: Vm" quantity="popIaf/0/iaf/v" scale="1mV" color="#04f0d0" timeScale="1ms"/>
            <Line id="popIaf 1: Vm" quantity="popIaf/1/iaf/v" scale="1mV" color="#8212f7" timeScale="1ms"/>
            <Line id="popIaf 2: Vm" quantity="popIaf/2/iaf/v" scale="1mV" color="#017ad0" timeScale="1ms"/>
        </Display>

        <Display id="display_popIafRef" title="Voltages popIafRef" timeScale="1ms" xmin="-50.0" xmax="550.0" ymin="-80" ymax="40">
            <Line id="popIafRef 0: Vm" quantity="popIafRef/0/iafRef/v" scale="1mV" color="#24ce01" timeScale="1ms"/>
            <Line id="popIafRef 1: Vm" quantity="popIafRef/1/iafRef/v" scale="1mV" color="#790b2f" timeScale="1ms"/>
            <Line id="popIafRef 2: Vm" quantity="popIafRef/2/iafRef/v" scale="1mV" color="#6099d7" timeScale="1ms"/>
        </Display>

        <Display id="display_popIzh" title="Voltages popIzh" timeScale="1ms" xmin="-50.0" xmax="550.0" ymin="-80" ymax="40">
            <Line id="popIzh 0: Vm" quantity="popIzh/0/RS/v" scale="1mV" color="#0dde6d" timeScale="1ms"/>
            <Line id="popIzh 1: Vm" quantity="popIzh/1/RS/v" scale="1mV" color="#966844" timeScale="1ms"/>
            <Line id="popIzh 2: Vm" quantity="popIzh/2/RS/v" scale="1mV" color="#29fc1d" timeScale="1ms"/>
        </Display>

        <Display id="display_popPyrS" title="Voltages popPyrS" timeScale="1ms" xmin="-50.0" xmax="550.0" ymin="-80" ymax="40">
            <Line id="popPyrS 0: Vm" quantity="popPyrS/0/pyr_4_sym_soma/v" scale="1mV" color="#8ead31" timeScale="1ms"/>
            <Line id="popPyrS 1: Vm" quantity="popPyrS/1/pyr_4_sym_soma/v" scale="1mV" color="#24ed49" timeScale="1ms"/>
            <Line id="popPyrS 2: Vm" quantity="popPyrS/2/pyr_4_sym_soma/v" scale="1mV" color="#eff35b" timeScale="1ms"/>
        </Display>

        <OutputFile id="Volts_file_popIaf" fileName="v_popIaf.dat">
            <OutputColumn id="v_0" quantity="popIaf/0/iaf/v"/>
            <OutputColumn id="v_1" quantity="popIaf/1/iaf/v"/>
            <OutputColumn id="v_2" quantity="popIaf/2/iaf/v"/>
        </OutputFile>

        <OutputFile id="Volts_file_popIafRef" fileName="v_popIafRef.dat">
            <OutputColumn id="v_0" quantity="popIafRef/0/iafRef/v"/>
            <OutputColumn id="v_1" quantity="popIafRef/1/iafRef/v"/>
            <OutputColumn id="v_2" quantity="popIafRef/2/iafRef/v"/>
        </OutputFile>

        <OutputFile id="Volts_file_popIzh" fileName="v_popIzh.dat">
            <OutputColumn id="v_0" quantity="popIzh/0/RS/v"/>
            <OutputColumn id="v_1" quantity="popIzh/1/RS/v"/>
            <OutputColumn id="v_2" quantity="popIzh/2/RS/v"/>
        </OutputFile>

        <OutputFile id="Volts_file_popPyrS" fileName="v_popPyrS.dat">
            <OutputColumn id="v_0" quantity="popPyrS/0/pyr_4_sym_soma/v"/>
            <OutputColumn id="v_1" quantity="popPyrS/1/pyr_4_sym_soma/v"/>
            <OutputColumn id="v_2" quantity="popPyrS/2/pyr_4_sym_soma/v"/>
        </OutputFile>

    </Simulation>

</Lems>
